R1 := 43 kΩ
R2 := 3 kΩ
C1 := 0.1 μF
C2 := 1 nF
j := sqrt(-1)
C := C1*C2/(C1 + C2)
R := R1 + R2
K := C/C2
τ_z := R2*C2
τ_p := R*C
f_p := 1/(2*π*τ_z) = 53051.6 1/s
f_start := 10 Hz
T(f) := K*(1 + (j*2*π*f)*τ_z)/(1 + (j*2*π*f)*τ_p)
f_stop := 100 kHz
N := 1024
i := 0 .. N - 1
f[i] := f_start*(f_stop/f_start)^(i/(N - 1))
M(f) := 20*log(|T(f)|)
ϕ(f) := 180/π*arg(T(f))
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